*HEADING
Model: Cantilevered composite box with tip shear
**********************
** NODES AND ELEMENTS
*INCLUDE,INPUT=all.msh
**********************
** COMPOSITE PROPERTIES
*MATERIAL,NAME=EL
*ELASTIC, TYPE =ENGINEERING CONSTANTS
128.0E9,11.0E9,11.0E9,0.28,0.3,0.3,4.5E9,4.5E9,
4.5E9,20.0
*DENSITY
1520.0
*INCLUDE,INPUT=composite_shell.inp
**********************
** BOUNDARY CONDITIONS AND LOAD SET
*BOUNDARY
*INCLUDE,INPUT=SPC_123456.bou
*INCLUDE,INPUT=TOP.nam
**********************
*STEP
*STATIC
*CLOAD
*INCLUDE,INPUT=AERO_FORCES.inp
*NODE FILE
U
*NODE PRINT,NSET=NTOP
U
*END STEP
